// SBML level 2 version 1

model MAPK_cascade()

  // Compartments:
  compartment compartment = 1;

  // Species:
  species E1 in compartment = 3e-5/compartment;
  species E2 in compartment = 0.0003/compartment;
  species KKK in compartment = 0.003/compartment;
  species P_KKK in compartment = 0;
  species KK in compartment = 1.2/compartment;
  species P_KK in compartment = 0;
  species PP_KK in compartment = 0;
  species K in compartment = 1.2/compartment;
  species P_K in compartment = 0;
  species PP_K in compartment = 0;
  species KPase in compartment = 0.12/compartment;
  species KKPase in compartment = 0.0003/compartment;
  species E1_KKK in compartment = 0;
  species E2_P_KKK in compartment = 0;
  species P_KKK_KK in compartment = 0;
  species P_KKK_P_KK in compartment = 0;
  species PP_KK_K in compartment = 0;
  species PP_KK_P_K in compartment = 0;
  species KKPase_PP_KK in compartment = 0;
  species KKPase_P_KK in compartment = 0;
  species KPase_PP_K in compartment = 0;
  species KPase_P_K in compartment = 0;

  // Reactions:
  r1a: KKK + E1 -> E1_KKK; a1*E1*KKK - d1*E1_KKK;
    a1 = 1000; d1 = 150;
  r1b: E1_KKK => E1 + P_KKK; r1b_k2*E1_KKK;
    r1b_k2 = 150;
  r2a: P_KKK + E2 -> E2_P_KKK; a2*E2*P_KKK - d2*E2_P_KKK;
    a2 = 1000; d2 = 150;
  r2b: E2_P_KKK => E2 + KKK; r2b_k2*E2_P_KKK;
    r2b_k2 = 150;
  r3a: KK + P_KKK -> P_KKK_KK; a3*KK*P_KKK - d3*P_KKK_KK;
    a3 = 1000; d3 = 150;
  r3b: P_KKK_KK => P_KK + P_KKK; k3*P_KKK_KK;
    k3 = 150;
  r4a: P_KK + KKPase -> KKPase_P_KK; a4*P_KK*KKPase - d4*KKPase_P_KK;
    a4 = 1000; d4 = 150;
  r4b: KKPase_P_KK -> KK + KKPase; k4*KKPase_P_KK;
    k4 = 150;
  r5a: P_KK + P_KKK -> P_KKK_P_KK; a5*P_KK*P_KKK - d5*P_KKK_P_KK;
    a5 = 1000; d5 = 150;
  r5b: P_KKK_P_KK => PP_KK + P_KKK; k5*P_KKK_P_KK;
    k5 = 150;
  r6a: PP_KK + KKPase -> KKPase_PP_KK; a6*PP_KK*KKPase - d6*KKPase_PP_KK;
    a6 = 1000; d6 = 150;
  r6b: KKPase_PP_KK -> P_KK + KKPase; k6*KKPase_PP_KK;
    k6 = 150;
  r7a: K + PP_KK -> PP_KK_K; a7*K*PP_KK - d7*PP_KK_K;
    a7 = 1000; d7 = 150;
  r7b: PP_KK_K => P_K + PP_KK; k7*PP_KK_K;
    k7 = 150;
  r8a: P_K + KPase -> KPase_P_K; a8*P_K*KPase - d8*KPase_P_K;
    a8 = 1000; d8 = 150;
  r8b: KPase_P_K -> K + KPase; k8*KPase_P_K;
    k8 = 150;
  r9a: P_K + PP_KK -> PP_KK_P_K; a9*P_K*PP_KK - d9*PP_KK_P_K;
    a9 = 1000; d9 = 150;
  r9b: PP_KK_P_K => PP_KK + PP_K; k9*PP_KK_P_K;
    k9 = 150;
  r10a: PP_K + KPase -> KPase_PP_K; a10*PP_K*KPase - d10*KPase_PP_K;
    a10 = 1000; d10 = 150;
  r10b: KPase_PP_K -> P_K + KPase; k10*KPase_PP_K;
    k10 = 150;
end
