// SBML level 2 version 1

model Goodwin()

  // Compartments:
  compartment default = 1;

  // Species:
  species x1 in default = 0.502562/default;
  species $dummy2 in default = 0.337805/default;
  species $dummy3 in default = -0.390752/default;
  species $dummy1 in default = 0.497438/default;
  species $sa3_degraded in default = 0;
  species $sa2_degraded in default = 0;
  species $sa1_degraded in default = 0;
  species X3 in default = 1.09075/default;
  species X2 in default = 0.33945/default;
  species X2bis in default = 0.3222745/default;
  species $sa13_degraded in default = 0;
  species fgf8 in default = 1/default;
  species FGF8 in default = 1/default;
  species $sa15_degraded in default = 0;
  species $gene_fgf8 in default = 0;

  // Parameters:
  p = 10;
  k1 = 1;
  k2 = 0.3;
  k3 = 0.3;
  k4 = 0.04;
  k9 = 0.1;
  k5 = 0.1;
  k6 = 0.08;
  k7 = 0.12;
  k8 = 0.2;
  k10 = 0.01;
  dfgf8 = 0.022;
  mama = 1;

  // Reactions:
  re3: $dummy1 => x1; k1/(1 + X3^p);  // modifiers: X3
  re4: $dummy2 => X2; k2*x1;  // modifiers: x1
  re6: $dummy3 => X3; k10*X2;  // modifiers: X2
  re7: x1 => $sa3_degraded; (k4 + 0.16*FGF8)*x1;
  re9: X2 => $sa2_degraded; (k5 + 0.1*FGF8 + k8)*X2;
  re10: X3 => $sa1_degraded; (k6 + 0.06*FGF8)*X3;
  re12: X2bis => X2; k9*X2bis;
  re13: X2bis => $sa13_degraded; k7*X2bis;
  re14: X2 => X2bis; k8*X2;
  re15: fgf8 => $sa15_degraded; fgf8*dfgf8;
  re16: $gene_fgf8 => fgf8; mama*dfgf8;
  re17: $dummy3 => X3; k3*X2bis;  // modifiers: X2bis
end
