// SBML level 1 version 1
// This model has been slightly modified for testing purposes
//      from a model obtained from http://sbml.org/models/.
//      The model has been published in
//      Kholodenko BN. Negative feedback and ultrasensitivity can bring
//      about oscillations in the mitogen-activated protein kinase cascades.
//      Eur. J. Biochem. 267: 1583-1588 (2000).

model oscillating_MAPK()

  // Compartments:
  compartment uVol = 1;

  // Species:
  species MKKK in uVol = 90/uVol;
  species MKKK_P in uVol = 10/uVol;
  species MKK in uVol = 280/uVol;
  species MKK_P in uVol = 10/uVol;
  species MKK_PP in uVol = 10/uVol;
  species MAPK in uVol = 280/uVol;
  species MAPK_P in uVol = 10/uVol;
  species MAPK_PP in uVol = 10/uVol;

  // Parameters:
  V1 = 2.5;
  Ki = 9;
  K1 = 10;

  // Reactions:
  J0: MKKK => MKKK_P; V1*MKKK/((1+(MAPK_PP/Ki)^n)*(K1+MKKK));
    n = 1;
  J1: MKKK_P => MKKK; V2*MKKK_P/(KK2+MKKK_P);
    V2 = 0.25; KK2 = 8;
  J2: MKK => MKK_P; k3*MKKK_P*MKK/(KK3+MKK);
    k3 = 0.025; KK3 = 15;
  J3: MKK_P => MKK_PP; k4*MKKK_P*MKK_P/(KK4+MKK_P);
    k4 = 0.025; KK4 = 15;
  J4: MKK_PP => MKK_P; V5*MKK_PP/(KK5+MKK_PP);
    V5 = 0.75; KK5 = 15;
  J5: MKK_P => MKK; V6*MKK_P/(KK6+MKK_P);
    V6 = 0.75; KK6 = 15;
  J6: MAPK => MAPK_P; k7*MKK_PP*MAPK/(KK7+MAPK);
    k7 = 0.025; KK7 = 15;
  J7: MAPK_P => MAPK_PP; k8*MKK_PP*MAPK_P/(KK8+MAPK_P);
    k8 = 0.025; KK8 = 15;
  J8: MAPK_PP => MAPK_P; V9*MAPK_PP/(KK9+MAPK_PP);
    V9 = 0.5; KK9 = 15;
  J9: MAPK_P => MAPK; V10*MAPK_P/(KK10+MAPK_P);
    V10 = 0.5; KK10 = 15;
end
